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/batch
! ANSYS input file written by Workbench version 16.0 RELEASE
! File used for geometry attach: C:\Users\Andres Felipe\OneDrive\Documents\Semestre\Elementos Finitos\CADS\CADS\simuavion_files\dp0\SYS\DM\SYS.agdb
/title,simuavion--Static Structural (A5)
/com,--- Data in consistent MKS units. See Solving Units in the help system for more information.
/units,MKS
/prep7
! Turn off shape checking because checks already performed inside WB mesher.
! See help system for more information.
SHPP,OFF,,NOWARN
etcon,set             ! allow ANSYS to choose best KEYOP's for 180x elements
/com,*********** Nodes for the whole assembly ***********
nblock,3
(1i9,3e20.9e3)
        1   -6.864098984E-001   -2.879684505E-001    1.824689874E-002
        2   -6.929857418E-001   -2.693404787E-001    1.790700000E-002
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-1
/com,*********** Elements for Body 1 "Solid" ***********
et,1,187
eblock,19,solid,,1803
(19i9)
        1        1        1        1        0        0        0        0       10        0        1       54       90       92      655     1128     1365     1130     1139
     1370     1392
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-1
/com,*********** Send User Defined Coordinate System(s) ***********
csys,0
toffst,273.15,  ! Temperature offset from absolute zero
/com,*********** Set Reference Temperature ***********
tref,22.
/com,*********** Send Materials ***********
MP,DENS,1,7850,	! kg m^-3
MP,ALPX,1,1.2e-05,	! C^-1
MP,C,1,434,	! J kg^-1 C^-1
MP,KXX,1,60.5,	! W m^-1 C^-1
MP,RSVX,1,1.7e-07,	! kg m^3 A^-2 s^-3
MP,EX,1,200000000000,	! Pa
MP,NUXY,1,0.3,
MP,MURX,1,10000,

!************************* Model Summary ********************
!Solid,	Structural Steel,	matid,	1
!************************* End Model Summary ********************
/com,*********** Fixed Supports ***********
CMBLOCK,_FIXEDSU,NODE,      130
(8i10)
        76        77        78        79        80        81       103       104
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cmsel,s,_FIXEDSU
d,all,all
nsel,all
nsel,all
/com,*********** Define Pressure Using Surface Effect Elements ***********
et,2,154
eblock,10,,,7
(15i9)
     1804        2        2        2        0       60       64       63       63     1190     1216       63     1189
     1805        2        2        2        0       27       61       65       65      942     1202       65      943
     1806        2        2        2        0       63       64       66       66     1216     1222       66     1217
     1807        2        2        2        0       62       63       66       66     1207     1217       66     1209
     1808        2        2        2        0       62       66       65       65     1209     1230       65     1208
     1809        2        2        2        0       61       62       65       65     1201     1208       65     1202
     1810        2        2        2        0       26       61       27       27      934      942       27      930
-1
esel,s,type,,2
esel,all

*DIM,_loadvari119,TABLE,2,1,1,TIME,
! Time values
_loadvari119(1,0,1) = 0.
_loadvari119(2,0,1) = 1.
! Load values
_loadvari119(1,1,1) = 0.
_loadvari119(2,1,1) = 30000.

esel,all
fini
/com,****************************************************************************
/com,*************************    SOLUTION       ********************************
/com,****************************************************************************
/solu
antype,0                   ! static analysis
eqsl,sparse,,,,,1
cntr,print,1               ! print out contact info and also make no initial contact an error
nldiag,cont,iter           ! print out contact info each equilibrium iteration
resc,,none                 ! Do not keep any restart files
/com,****************************************************
/com,******************* SOLVE FOR LS 1 ****************
esel,s,type,,2
nsle
sf,all,pres,%_loadvari119%
nsel,all
esel,all
esel,all
nsub,1,1,1
time,1.
outres,erase
outres,all,none
outres,nsol,all
outres,rsol,all
outres,strs,all
outres,epel,all
outres,eppl,all
stabilize,off                   ! Stabilization turned OFF by user
! *********** WB SOLVE COMMAND ***********
! check interactive state
*get,ANSINTER_,active,,int
*if,ANSINTER_,ne,0,then
/eof
*endif
solve
/com *************** Write FE CONNECTORS *********
CEWRITE,file,ce,,INTE
/com,****************************************************
/com,*************** FINISHED SOLVE FOR LS 1 *************
*set,_DS_PROGRESS          ! turn off progress updates to avoid virus scanning bug
/post1
fini
